// SBML level 2 version 4

function pgk_fun(S1, S2, P1, P2, V, KS1, KS2, KP1, KP2, Keq, nS2)
  V*(S2/KS2)^(nS2 - 1)*(S1*S2/(KS1*KS2) - P1*P2/(KS1*KS2*Keq))/((1 + S1/KS1 + P1/KP1)*(1 + (S2/KS2)^nS2 + P2/KP2));
end
pgk_fun is "phosphoglycerate kinase kinetics";

function tpi_fun(S, P, V, KS, KP, KiP, Keq)
  V/KS*(S - P/Keq)/(1 + S/KS + P/KP*(1 + (P/KiP)^4));
end
tpi_fun is "triose-phosphate isomerase kinetics";

function max(a, b)
  (a + b + abs(a - b))/2;
end

function rmm_ub(S, P1, P2, V, KS, KP1, KP2, KiP2, Keq)
  V*(S/KS - P1*P2/(KS*Keq))/(1 + S/KS + P1/KP1 + P2/KP2 + S*P2/(KS*KiP2) + P1*P2/(KP1*KP2));
end
rmm_ub is "reversible michaelis-menten: ordered uni-bi";

function rmm2(S1, S2, P1, P2, V, KS1, KS2, KP1, KP2, Keq)
  V*(S1*S2/(KS1*KS2) - P1*P2/(KS1*KS2*Keq))/((1 + S1/KS1 + P1/KP1)*(1 + S2/KS2 + P2/KP2));
end
rmm2 is "reversible michaelis-menten: two noncompeting couples";

function rmm1(S, P, V, KS, KP, Keq)
  V*(S/KS - P/(KS*Keq))/(1 + S/KS + P/KP);
end
rmm1 is "reversible michaelis-menten: one substrate, one product";

function Function_for_enolase__ENO1(ENO1, Keq_ENO, Kp2g, Kpep, P2G, PEP, kcat)
  rmm1(P2G, PEP, ENO1*kcat, Kp2g, Kpep, Keq_ENO);
end
Function_for_enolase__ENO1 is "Function for enolase [ENO1]";

function Function_for_enolase__ENO2(ENO2, Keq_ENO, Kp2g, Kpep, P2G, PEP, kcat)
  rmm1(P2G, PEP, ENO2*kcat, Kp2g, Kpep, Keq_ENO);
end
Function_for_enolase__ENO2 is "Function for enolase [ENO2]";

function Function_for_3_phosphoglycerate_kinase(ADP, ATP, BPG, Kadp, Katp, Kbpg, Keq, Kp3g, P3G, PGK1, kcat, nHadp)
  pgk_fun(BPG, ADP, P3G, ATP, PGK1*kcat, Kbpg, Kadp, Kp3g, Katp, Keq, nHadp);
end
Function_for_3_phosphoglycerate_kinase is "Function for 3-phosphoglycerate kinase";

function Function_for_glyceraldehyde_phosphate_dehydrogenase__TDH1(BPG, GAP, Kbpg, Keq_TDH, Kgap, Knad, Knadh, NAD, NADH, TDH1, kcat)
  rmm2(GAP, NAD, BPG, NADH, TDH1*kcat, Kgap, Knad, Kbpg, Knadh, Keq_TDH);
end
Function_for_glyceraldehyde_phosphate_dehydrogenase__TDH1 is "Function for glyceraldehyde phosphate dehydrogenase [TDH1]";

function Function_for_phosphoglyceromutase(GPM1, Keq, Kp2g, Kp3g, P2G, P3G, kcat)
  rmm1(P3G, P2G, GPM1*kcat, Kp3g, Kp2g, Keq);
end

function Function_for_triosephosphate_isomerase(DHAP, GAP, Kdhap, Keq, Kgap, Kigap, TPI1, kcat)
  tpi_fun(DHAP, GAP, TPI1*kcat, Kdhap, Kgap, Kigap, Keq);
end

function Function_for_fructosebisphosphate_aldolase(DHAP, F16bP, FBA1, GAP, Kdhap, Keq, Kf16bp, Kgap, Kigap, kcat)
  rmm_ub(F16bP, DHAP, GAP, FBA1*kcat, Kf16bp, Kdhap, Kgap, Kigap, Keq);
end

function Function_for_glyceraldehyde_phosphate_dehydrogenase__TDH2(BPG, GAP, Kbpg, Keq_TDH, Kgap, Knad, Knadh, NAD, NADH, TDH2, kcat)
  rmm2(GAP, NAD, BPG, NADH, TDH2*kcat, Kgap, Knad, Kbpg, Knadh, Keq_TDH);
end
Function_for_glyceraldehyde_phosphate_dehydrogenase__TDH2 is "Function for glyceraldehyde phosphate dehydrogenase [TDH2]";

function Function_for_glyceraldehyde_phosphate_dehydrogenase__TDH3(BPG, GAP, Kbpg, Keq_TDH, Kgap, Knad, Knadh, NAD, NADH, TDH3, kcat)
  rmm2(GAP, NAD, BPG, NADH, TDH3*kcat, Kgap, Knad, Kbpg, Knadh, Keq_TDH);
end
Function_for_glyceraldehyde_phosphate_dehydrogenase__TDH3 is "Function for glyceraldehyde phosphate dehydrogenase [TDH3]";

model Smallbone2013___Glycolysis_in_S_cerevisiae___Iteration_18()
  // Smallbone2013 - Glycolysis in S.cerevisiae - Iteration 18
  // This model is described in the article:
  // A model of yeast glycolysis based on a consistent kinetic characterization of all its enzymes
  // Kieran Smallbone, Hanan L. Messiha, Kathleen M. Carroll, Catherine L. Winder, Naglis Malys, Warwick B. Dunn, Ettore Murabito, Neil Swainston, Joseph O. Dada, Farid Khan, Pınar Pir, Evangelos Simeonidis, Irena Spasić, Jill Wishart, Dieter Weichart, Neil W. Hayes, Daniel Jameson, David S. Broomhead, Stephen G. Oliver, Simon J. Gaskell, John E.G. McCarthy, Norman W. Paton, Hans V. Westerhoff, Douglas B. Kell, Pedro Mendes
  // FEBS Letters (in press)
  // Abstract:
  // We present an experimental and computational pipeline for the generation of kinetic models of metabolism, and demonstrate its application to glycolysis in Saccharomyces cerevisiae. Starting from an approximate mathematical model, we employ a “cycle of knowledge” strategy, identifying the steps with most control over flux. Kinetic parameters of the individual isoenzymes within these steps are measured experimentally under a standardised set of conditions. Experimental strategies are applied to establish a set of in vivo concentrations for isoenzymes and metabolites. The data are integrated into a mathematical model that is used to predict a new set of metabolite concentrations and reevaluate the control properties of the system. This bottom-up modelling study reveals that control over the metabolic network most directly involved in yeast glycolysis is more widely distributed than previously thought.
  // This model is hosted on BioModels Database and identified by: MODEL1303260018 .
  // To cite BioModels Database, please use: BioModels Database: An enhanced, curated and annotated resource for published quantitative kinetic models .
  // To the extent possible under law, all copyright and related or neighbouring rights to this encoded model have been dedicated to the public domain worldwide. Please refer to CC0 Public Domain Dedication for more information.
  // biomodels.db:MODEL1303260018
  // taxonomy:4932

  // Compartments:
  compartment cell = 1;  // GO:0005829

  // Species:
  species ADP in cell = 1.29;  // CHEBI:16761; kegg.compound:C00008
  species ATP in cell = 4.29;  // kegg.compound:C00002; CHEBI:15422
  species BPG in cell = 0.0007368735; BPG is "1,3-bisphosphoglycerate";  // kegg.compound:C00236; CHEBI:16001
  species DHAP in cell = 3496987/volume/NA; DHAP is "dihydroxyacetone phosphate";  // kegg.compound:C00111; CHEBI:16108
  species F16bP in cell = 13800392/volume/NA; F16bP is "fructose 1,6-bisphosphate";  // kegg.compound:C05378; CHEBI:28013
  species GAP in cell = 951170/volume/NA; GAP is "glyceraldehyde 3-phosphate";  // kegg.compound:C00118; CHEBI:29052
  species NAD in cell = 1.50329;  // CHEBI:15846; kegg.compound:C00003
  species P2G in cell = 0.06773791; P2G is "2-phosphoglycerate";  // CHEBI:17835; kegg.compound:C00631
  species P3G in cell = 0.469825; P3G is "3-phosphoglycerate";  // CHEBI:17794; kegg.compound:C00197
  species PEP in cell = 1836769/volume/NA; PEP is "phosphoenolpyruvate";  // CHEBI:18021; kegg.compound:C00074
  species $NADH in cell;  // CHEBI:16908; kegg.compound:C00004
  species $ENO1 in cell = 2066714/volume/NA;
  species $ENO2 in cell = 5945196/volume/NA;
  species $FBA1 in cell = 4030000/volume/NA;
  species $GPM1 in cell = 2198082/volume/NA;
  species $PGK1 in cell = 775823/volume/NA;
  species $TDH1 in cell = 1056478/volume/NA;
  species $TDH2 in cell = 0;
  species $TDH3 in cell = 12659757/volume/NA;
  species $TPI1 in cell = 886332/volume/NA;

  // Parameters:
  Keq_ADH = 14492.75 unit_0;
  Keq_ENO = 6.7 unit_0;
  Keq_HXK = 2000 unit_0;
  Keq_PYK = 6500 unit_0;
  Keq_TDH = 0.005334127 unit_0;
  NA = 6.02214e20 unit_1; NA is "Avogadro constant";
  sum_AXP = 6.02 unit_2;
  sum_NAD = 1.59 unit_2;
  sum_UXP = 1.397846 unit_2;
  volume = 5e-15 unit_3;
  energy_charge has unit_0;
  sum_PXG has unit_2; sum_PXG is "glycerate phosphates";

  // Assignment rules:
  sum_PXG := P2G + P3G;
  energy_charge := (ATP + ADP/2)/sum_AXP;
  NADH := max(sum_NAD - NAD, 0);

  // Reactions:
  ENO_ENO1: P2G -> PEP; cell*Function_for_enolase__ENO1(ENO1, Keq_ENO, ENO_ENO1_Kp2g, ENO_ENO1_Kpep, P2G, PEP, ENO_ENO1_kcat); ENO_ENO1 is "enolase [ENO1]";  // modifiers: ENO1; kegg.reaction:R00658; isVersionOf GO:0004634; isVersionOf ec-code:4.2.1.11
    ENO_ENO1_Kp2g = 0.043; ENO_ENO1_Kpep = 0.5; ENO_ENO1_kcat = 7.6;
  FBA: F16bP -> DHAP + GAP; cell*Function_for_fructosebisphosphate_aldolase(DHAP, F16bP, FBA1, GAP, FBA_Kdhap, FBA_Keq, Kf16bp, FBA_Kgap, FBA_Kigap, FBA_kcat); FBA is "fructosebisphosphate aldolase";  // modifiers: FBA1; kegg.reaction:R01068; isVersionOf GO:0004332; isVersionOf ec-code:4.1.2.13
    FBA_Kdhap = 2; FBA_Keq = 0.069; Kf16bp = 0.4507; FBA_Kgap = 2.4; FBA_Kigap = 10; FBA_kcat = 4.139;
  GPM: P3G -> P2G; cell*Function_for_phosphoglyceromutase(GPM1, GPM_Keq, GPM_Kp2g, GPM_Kp3g, P2G, P3G, GPM_kcat); GPM is "phosphoglyceromutase";  // modifiers: GPM1; kegg.reaction:R01518; isVersionOf ec-code:5.4.2.1; isVersionOf GO:0004619
    GPM_Keq = 0.19; GPM_Kp2g = 1.41; GPM_Kp3g = 1.2; GPM_kcat = 400;
  PGK: ADP + BPG -> ATP + P3G; cell*Function_for_3_phosphoglycerate_kinase(ADP, ATP, BPG, Kadp, Katp, PGK_Kbpg, PGK_Keq, PGK_Kp3g, P3G, PGK1, PGK_kcat, nHadp); PGK is "3-phosphoglycerate kinase";  // modifiers: PGK1; kegg.reaction:R01512; isVersionOf ec-code:2.7.2.3; isVersionOf GO:0004618
    Kadp = 0.2; Katp = 1.99; PGK_Kbpg = 0.003; PGK_Keq = 3200; PGK_Kp3g = 4.58; PGK_kcat = 58.6; nHadp = 2;
  TDH_TDH1: GAP + NAD -> BPG + $NADH; cell*Function_for_glyceraldehyde_phosphate_dehydrogenase__TDH1(BPG, GAP, TDH_TDH1_Kbpg, Keq_TDH, TDH_TDH1_Kgap, TDH_TDH1_Knad, TDH_TDH1_Knadh, NAD, NADH, TDH1, TDH_TDH1_kcat); TDH_TDH1 is "glyceraldehyde phosphate dehydrogenase [TDH1]";  // modifiers: TDH1; kegg.reaction:R01061; isVersionOf ec-code:1.2.1.12; isVersionOf GO:0004365
    TDH_TDH1_Kbpg = 0.0098; TDH_TDH1_Kgap = 0.495; TDH_TDH1_Knad = 0.09; TDH_TDH1_Knadh = 0.06; TDH_TDH1_kcat = 19.12;
  TPI: DHAP -> GAP; cell*Function_for_triosephosphate_isomerase(DHAP, GAP, TPI_Kdhap, TPI_Keq, TPI_Kgap, TPI_Kigap, TPI1, TPI_kcat); TPI is "triosephosphate isomerase";  // modifiers: TPI1; kegg.reaction:R01015; isVersionOf ec-code:5.3.1.1; isVersionOf GO:0004807
    TPI_Kdhap = 6.454; TPI_Keq = 0.045; TPI_Kgap = 5.25; TPI_Kigap = 35.1; TPI_kcat = 564.38;
  glyceraldehyde_phosphate_dehydrogenase__TDH3: GAP + NAD -> BPG + $NADH; cell*Function_for_glyceraldehyde_phosphate_dehydrogenase__TDH3(BPG, GAP, glyceraldehyde_phosphate_dehydrogenase__TDH3_Kbpg, Keq_TDH, glyceraldehyde_phosphate_dehydrogenase__TDH3_Kgap, glyceraldehyde_phosphate_dehydrogenase__TDH3_Knad, glyceraldehyde_phosphate_dehydrogenase__TDH3_Knadh, NAD, NADH, TDH3, glyceraldehyde_phosphate_dehydrogenase__TDH3_kcat); glyceraldehyde_phosphate_dehydrogenase__TDH3 is "glyceraldehyde phosphate dehydrogenase [TDH3]";  // modifiers: TDH3
    glyceraldehyde_phosphate_dehydrogenase__TDH3_Kbpg = 0.909; glyceraldehyde_phosphate_dehydrogenase__TDH3_Kgap = 0.423; glyceraldehyde_phosphate_dehydrogenase__TDH3_Knad = 0.09; glyceraldehyde_phosphate_dehydrogenase__TDH3_Knadh = 0.06; glyceraldehyde_phosphate_dehydrogenase__TDH3_kcat = 18.162;
  glyceraldehyde_phosphate_dehydrogenase__TDH2: GAP + NAD -> BPG + $NADH; cell*Function_for_glyceraldehyde_phosphate_dehydrogenase__TDH2(BPG, GAP, glyceraldehyde_phosphate_dehydrogenase__TDH2_Kbpg, Keq_TDH, glyceraldehyde_phosphate_dehydrogenase__TDH2_Kgap, glyceraldehyde_phosphate_dehydrogenase__TDH2_Knad, glyceraldehyde_phosphate_dehydrogenase__TDH2_Knadh, NAD, NADH, TDH2, glyceraldehyde_phosphate_dehydrogenase__TDH2_kcat); glyceraldehyde_phosphate_dehydrogenase__TDH2 is "glyceraldehyde phosphate dehydrogenase [TDH2]";  // modifiers: TDH2
    glyceraldehyde_phosphate_dehydrogenase__TDH2_Kbpg = 0.0098; glyceraldehyde_phosphate_dehydrogenase__TDH2_Kgap = 0.77; glyceraldehyde_phosphate_dehydrogenase__TDH2_Knad = 0.09; glyceraldehyde_phosphate_dehydrogenase__TDH2_Knadh = 0.06; glyceraldehyde_phosphate_dehydrogenase__TDH2_kcat = 8.633;
  enolase__ENO2: P2G -> PEP; cell*Function_for_enolase__ENO2(ENO2, Keq_ENO, enolase__ENO2_Kp2g, enolase__ENO2_Kpep, P2G, PEP, enolase__ENO2_kcat); enolase__ENO2 is "enolase [ENO2]";  // modifiers: ENO2
    enolase__ENO2_Kp2g = 0.104; enolase__ENO2_Kpep = 0.5; enolase__ENO2_kcat = 19.87;

  // Unit definitions:
  unit substance = 1e-3 mole;
  unit unit_0 = dimensionless^0; unit_0 is "1";
  unit unit_1 = 1 / (1000 mole); unit_1 is "1/kmol";
  unit unit_2 = 1e-3 mole / litre; unit_2 is "mmol/l";
  unit unit_3 = litre; unit_3 is "l";
end
